δ := 0.43
α := 0.043
β := 0.00043
γ := 0.0180
x0 := 630  # Y0 -(x) це здобич, їх популяція | D<1>
f(t, y) := [(α - β*y[1])*y[0]; (-γ + β*δ*y[0])*y[1]]
y0 := 48  # Y1 (y) це хижаки їх популяція | D<2>
M := 5000
t0 := 0
t1 := 1200  # Кількість відкірзків - M
# Час від t0 до t1, в розв'язку в D<0>
D := rkfixed([x0; y0], t0, t1, M, f)
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# Жертви - здобич
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max(D[:, 1]) = 688.389
min(D[:, 1]) = 0.588083
# Хижаки
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max(D[:, 2]) = 414.441
min(D[:, 2]) = 7.04988
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