k := 0.00038
x0 := 83  # Y0 -(x) хворі, їх популяція | D<1>
f(t, y) := [y[0]*(k*y[1] - 1); -k*y[0]*y[1]]
y0 := 53000  # Y1 (y) здорові, їх популяція | D<2>
M := 20000
t0 := 0
t1 := 20  # Кількість відкірзків - M
# Час від t0 до t1, в розв'язку в D<0>
D := rkfixed([x0; y0], t0, t1, M, f)
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# кількість хворих
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# хворі
max(D[:, 1]) = 42549.5
min(D[:, 1]) = 0.000154048
D =  # no stored result
# Здорові
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max(D[:, 2]) = 53000
min(D[:, 2]) = 9.20211e-5
