λ := 1/27
μ := 1/17
N := 6
c := 2
ρ := λ/μ
n := c .. N
ρ/c = 0.314815
p[0] := (sum(ρ^n/n!, n = 0 .. c - 1) + ρ^c*(1 - (ρ/c)^(N - c + 1))/(c!*(1 - ρ/c)))^-1 = 0.52137
p[n] := ρ^n*p[0]/(c!*c^(n - c))
Lq := ρ^(c + 1)/((c - 1)!*(c - ρ)^2)*(1 - (ρ/c)^(N - c + 1) - (N - c + 1)*(1 - ρ/c)*(ρ/c)^(N - c))*p[0] = 0.0667525
Wq := Lq/λ = 1.80232
λe := λ*(1 - p[N]) = 0.0369994
Ls := Lq + λ*(1 - p[N])/μ = 0.695743
Ws := Wq + 1/μ = 18.8023
U := λe/(c*μ) = 0.314495
