λ := 1/27
μ := 1/17
c := 2
N := 6
ρ := λ/μ
p0 := (sum(combin(N, n)*ρ^n, n = 0 .. c) + sum(combin(N, n)*n!*ρ^n/(c!*c^(n - c)), n = c + 1 .. N))^-1
j := c + 1 .. N
i := 0 .. c
p[i] := combin(N, i)*ρ^i*p0
p[j] := combin(N, j)*j!*ρ^j/(c!*c^(j - c))*p0
Ls := sum(n*p[n], n = 0 .. N) = 3.11822
λef := λ*(N - Ls)
U := λef/(c*μ) = 0.907227
Ws := Ls/λef = 29.2153
Wq := Ws - 1/μ = 12.2153
Lq := λef*Wq = 1.30377
