x := [6, 8, 9, 6, 6, 4, 5, 7, 8, 8, 5, 6, 5, 6, 7]
ORIGIN := 1
n := 5
k := 3
i := 1 .. k
S[i] := |sum(x[:, n], n = (i - 1)*n + 1 .. i*n)|
N := k*n
S = [35; 32; 29]
X[i] := S[i]/n
X = [7; 6.4; 5.8]
Xtotal := sum(X[i], i)/k = 6.4
S = [35; 32; 29]
S2[i] := sum(|x[:, j] - X[i]|^2, j = (i - 1)*n + 1 .. n*i)/(n - 1)
S2 = [2; 3.3; 0.7]
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S2Total := sum(|x[:, i] - Xtotal|^2, i = 1 .. N)/(N - 1) = 1.97143
DfTotal := N - 1 = 14
SumD2Total := DfTotal*S2Total = 27.6
# Source  SS  df  MS  F  Prob>F
# ----------------------------------------
# Columns  3.6  2  1.8  0.9  0.4323
# Error  24  12  2
# Total  27.6  14
SumD2BG := sum((X[j]*X[j])*n, j = 1 .. k) - sum(|x[:, j]|, j = 1 .. N)^2/N = 3.6
dfBG := k - 1 = 2
dfWG := N - k = 12
SumD2WG := SumD2Total - SumD2BG = 24
S2BG := SumD2BG/dfBG = 1.8
S2WG := SumD2WG/dfWG = 2
dfBG = 2
F := S2BG/S2WG = 0.9
Fk := 3.88
dfWG = 12
# F менше критичного
