ORIGIN := 1
x := [5, 4, 2, 3, 6, 2, 3, 5, 7, 8, 3, 7, 9, 6, 5, 1, 4, 7, 6, 2, 4, 5, 4, 7, 3, 6, 2, 5, 4, 7]
i := 1 .. 6
n := 5
k := 6
S[i] := |sum(x[:, n], n = (i - 1)*5 + 1 .. i*5)|
CountA := 3
S = [20; 25; 30; 20; 23; 24]
CountB := 2
N := 30
S = [20; 25; 30; 20; 23; 24]
Na := 10
a := 1 .. 3
Sa[a] := S[a*2 - 1] + S[a*2]
transpose(Sa) = [45, 50, 47]
Nb := 15
b := 1 .. 2
Sb[b] := S[b] + S[b + 2] + S[b + 4]
transpose(Sb) = [73, 69]
Nt := 30
sum(Sa[a], a) = 142
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DfTotal := Nt - 1 = 29  # общая
sum(Sb[b], b) = 142
Xt := sum(Sa[a], a)/Nt = 4.73333
S2Total := sum(|x[:, i] - Xt|^2, i = 1 .. Nt)/(Nt - 1) = 4.13333  # общая
SumD2Total := DfTotal*S2Total = 119.867  # общая
sum(S[j], j = 1 .. n) = 118
# Source  SS  df  MS  F  Prob>F
# ----------------------------------------------------
# Columns  0.533  1  0.53333  0.12  0.7312
# Rows  1.267  2  0.63333  0.14  0.8671
# Interaction  12.067  2  6.03333  1.37  0.2742
# Error  106  24  4.41667
# Total  119.867  29
SumD2BG := sum((S[j]*S[j])/n, j = 1 .. k) - sum(|x[:, j]|, j = 1 .. Nt)^2/Nt = 13.8667  # Общая факторная
dfBG := CountA*CountB - 1 = 5  # Общая факторная
S2BG := SumD2BG/dfBG = 2.77333  # Общая факторная
# Остаточная | Error
dfWG := N - CountA*CountB = 24
sum(|x[:, j]|, j = 1 .. Nt)^2/Nt = 672.133
SumD2WG := SumD2Total - SumD2BG = 106
S2WG := SumD2WG/dfWG = 4.41667
# Фактор А
# Фактор B
sum(Sb[b]^2, b)/(n*CountA) = 672.667
dfA := CountA - 1 = 2
dfB := CountB - 1 = 1
n*CountA = 15
SumD2A := sum(Sa[a]^2, a)/(n*CountB) - sum(|x[:, j]|, j = 1 .. Nt)^2/Nt = 1.26667
SumD2B := sum(Sb[b]^2, b)/(n*CountA) - sum(|x[:, j]|, j = 1 .. Nt)^2/Nt = 0.533333
S2A := SumD2A/dfA = 0.633333
S2B := SumD2B/dfB = 0.533333
Interaction
dfAB := dfA*dfB = 2
SumD2AB := SumD2BG - SumD2A - SumD2B = 12.0667
S2AB := SumD2AB/dfAB = 6.03333
# Критерії шіфера
Fa := S2A/S2WG = 0.143396
Fb := S2B/S2WG = 0.120755
Fab := S2AB/S2WG = 1.36604
Fbg := S2BG/S2WG = 0.627925
