Y == b[0] + b[1]*x[1] + b[2]*x[2]
y := [0, 0, 0; 0, 260, 280; 0, 360, 380]
b := [
    (y[1, 1] + y[1, 2] + y[2, 1] + y[2, 2])/4;
    (-y[1, 1] - y[1, 2] + y[2, 1] + y[2, 2])/4;
    (-y[1, 1] + y[1, 2] - y[2, 1] + y[2, 2])/4
] = [320; 50; 10]
Y == b[0] + b[1]*x[1] + b[2]*x[2] → Y == 50*x[1] + 10*x[2] + 320
Y == b[0] + b[1]*x[1] + b[2]*x[2] + b[3]*x[1]*x[2]
b := [
    (y[1, 1] + y[1, 2] + y[2, 1] + y[2, 2])/4;
    (-y[1, 1] - y[1, 2] + y[2, 1] + y[2, 2])/4;
    (-y[1, 1] + y[1, 2] - y[2, 1] + y[2, 2])/4;
    (y[1, 1] - y[1, 2] - y[2, 1] + y[2, 2])/4
] = [320; 50; 10; 0]
Y == b[0] + b[1]*x[1] + b[2]*x[2] + b[3]*x[1]*x[2] → Y == 50*x[1] + 10*x[2] + 320
