y(x) := if(x < 1, x*tan(60*deg), if(x < 6, tan(60*deg), tan(60*deg)*(x - 5)))
y2(x) := if(x < 5, 0, if(x < 5, tan(60*deg), tan(60*deg)*(x - 5)))
t := 0, 0 + 0.001 .. 6
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Sr := integral(y(x) - y2(x), x = 0 .. 6) = 8.66025
Sr = 8.66025
yMax := tan(60*deg)
xMax := 6
j := 0 .. 7  # номер N
k := 1 .. 10  # номер експерименту
N := [100; 200; 500; 1000; 2000; 5000; 10000; 20000]
i := 0 .. N[7] - 1
X[i, k, j] := rnd(xMax)
Y[i, k, j] := rnd(yMax)
T[i, k, j] := if(y(X[i, k, j]) - y2(X[i, k, j]) > Y[i, k, j], 1, 0)
n[j, k] := sum(T[i, k, j], i = 0 .. N[j] - 1)
S[j, k] := n[j, k]*xMax*yMax/N[j]
M[j] := sum(S[j, i], i = 1 .. 10)/10
D[j] := sum((S[j, i] - M[j])^2, i = 1 .. 10)/(10 - 1)
Sr = 8.66025
S[j] := N[j]
S = [
    100, 8.93738, 9.04131, 8.31384, 8.93738, 8.62561, 9.14523, 8.83346, 8.72954, 8.83346, 8.62561;
    200, 8.7815, 8.93738, 8.41777, 8.72954, 8.67757, 9.04131, 8.7815, 8.72954, 8.67757, 8.7815;
    500, 8.58404, 8.68797, 8.60483, 8.54247, 8.58404, 8.70875, 8.87503, 8.81267, 8.66718, 8.45934;
    1000, 8.6464, 8.70875, 8.75032, 8.57365, 8.41777, 8.55287, 8.84385, 8.76071, 8.55287, 8.52169;
    2000, 8.62561, 8.75552, 8.63601, 8.63081, 8.58924, 8.60483, 8.72954, 8.79189, 8.63601, 8.63601;
    5000, 8.69212, 8.73993, 8.70875, 8.64224, 8.68589, 8.63808, 8.65679, 8.66095, 8.71499, 8.65679;
    10000, 8.70356, 8.67757, 8.65783, 8.63497, 8.6225, 8.70459, 8.64328, 8.62561, 8.65679, 8.65471;
    20000, 8.63393, 8.63185, 8.64952, 8.64744, 8.63964, 8.65783, 8.64432, 8.60327, 8.70407, 8.65471
]
n = [
    0, 86, 87, 80, 86, 83, 88, 85, 84, 85, 83;
    0, 169, 172, 162, 168, 167, 174, 169, 168, 167, 169;
    0, 413, 418, 414, 411, 413, 419, 427, 424, 417, 407;
    0, 832, 838, 842, 825, 810, 823, 851, 843, 823, 820;
    0, 1660, 1685, 1662, 1661, 1653, 1656, 1680, 1692, 1662, 1662;
    0, 4182, 4205, 4190, 4158, 4179, 4156, 4165, 4167, 4193, 4165;
    0, 8375, 8350, 8331, 8309, 8297, 8376, 8317, 8300, 8330, 8328;
    0, 16616, 16612, 16646, 16642, 16627, 16662, 16636, 16557, 16751, 16656
]
e := 7
n := 1
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# e  - це номер експерименту
# 7 - це порядковий номер N - кількості точок
transpose(S) = [
    100, 200, 500, 1000, 2000, 5000, 10000, 20000;
    8.93738, 8.7815, 8.58404, 8.6464, 8.62561, 8.69212, 8.70356, 8.63393;
    9.04131, 8.93738, 8.68797, 8.70875, 8.75552, 8.73993, 8.67757, 8.63185;
    8.31384, 8.41777, 8.60483, 8.75032, 8.63601, 8.70875, 8.65783, 8.64952;
    8.93738, 8.72954, 8.54247, 8.57365, 8.63081, 8.64224, 8.63497, 8.64744;
    8.62561, 8.67757, 8.58404, 8.41777, 8.58924, 8.68589, 8.6225, 8.63964;
    9.14523, 9.04131, 8.70875, 8.55287, 8.60483, 8.63808, 8.70459, 8.65783;
    8.83346, 8.7815, 8.87503, 8.84385, 8.72954, 8.65679, 8.64328, 8.64432;
    8.72954, 8.72954, 8.81267, 8.76071, 8.79189, 8.66095, 8.62561, 8.60327;
    8.83346, 8.67757, 8.66718, 8.55287, 8.63601, 8.71499, 8.65679, 8.70407;
    8.62561, 8.7815, 8.45934, 8.52169, 8.63601, 8.65679, 8.65471, 8.65471
]
α := 0.05
T := qt(1 - α/2, 10 - 1) = 2.26216
T = 2.26216
S[1, 2] = 8.93738
transpose(transpose(S)[:, 1])[:, 2] = [8.93738]
M[j] := sum(S[j, i], i = 1 .. 10)/10
D[j] := sum((S[j, i] - M[j])^2, i = 1 .. 10)/(10 - 1)
K[j] := sqrt(D[j])*T/sqrt(10)
K[1] = 0.117871
R[j] := M[j] + K[j]
# L  <=  M  <= R
L[j] := M[j] - K[j]
D = [0.05772; 0.02715; 0.0156528; 0.0172812; 0.0047823; 0.00116064; 0.000855372; 0.000645975]
transpose(M) = [8.80228, 8.75552, 8.65263, 8.63289, 8.66354, 8.67965, 8.65814, 8.64666]
transpose(R) = [8.97415, 8.87339, 8.74213, 8.72693, 8.71301, 8.70402, 8.67906, 8.66484]
M = [8.80228; 8.75552; 8.65263; 8.63289; 8.66354; 8.67965; 8.65814; 8.64666]
transpose(L) = [8.63042, 8.63765, 8.56313, 8.53885, 8.61408, 8.65528, 8.63722, 8.62848]
transpose(D) = [0.05772, 0.02715, 0.0156528, 0.0172812, 0.0047823, 0.00116064, 0.000855372, 0.000645975]
