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N := 10000
a := 0
f2(x) := nthroot((12*x^3 - 8*x + 16), 6)/nthroot(-3*x^5 + 3*x - 8, 5)
b := 3
S2 :=
    y ← 0
    for i ∈ 1 .. N
        x ← rnd(b)
        y ← y + f2(x)
    y*(b - a)/N
integral(f2(x), x = a .. b) = -2.81084
S2 = -2.80168
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a1 := 0
b1 := 2
a2 := 0
b2 := 5
f3(x1, x2) := 6*x1^3*x2^4
integral(integral(f3(x1, x2), x1 = a2 .. b1), x2 = a1 .. b2) = 15000
S3 :=
    z ← 0
    for i ∈ 1 .. N
        v ← runif(2, 0, 1)
        x1 ← (b1 - a1)*v[0] + a1
        x2 ← (b2 - a2)*v[1] + a2
        z ← z + f3(x1, x2)
        i
    (b2 - a2)*(b1 - a1)/N*z
S3 = 15376.3
