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ORIGIN := 1
P := [0.45, 0.25, 0.3; 0.45, 0.05, 0.5; 0.6, 0.15, 0.25]
P0 := [0.1; 0.3; 0.6]
I := [1, 0, 0; 0, 1, 0; 0, 0, 1]
C := transpose(P) - I
j := 1 .. 3
C = [-0.55, 0.45, 0.6; 0.25, -0.95, 0.15; 0.3, 0.5, -0.75]
C[3, j] := 1
q := [0; 0; 1]
C = [-0.55, 0.45, 0.6; 0.25, -0.95, 0.15; 1, 1, 1]
p := C^-1*q
p = [0.498047; 0.181641; 0.320312]
k := 1 .. 5
p[k] := transpose(P0)*P^k
p[1] = [0.54, 0.13, 0.33]
p[2] = [0.4995, 0.191, 0.3095]
p[k] = [
    [0.54, 0.13, 0.33]; [0.4995, 0.191, 0.3095]; [0.496425, 0.18085, 0.322725]; [0.498409, 0.181557, 0.320034]; [0.498005, 0.181685, 0.32031]
]
p[3] = [0.496425, 0.18085, 0.322725]
p[4] = [0.498409, 0.181557, 0.320034]
p[5] = [0.498005, 0.181685, 0.32031]
