λ01 := 4
λ02 := 2
λ10 := 4
λ12 := 3
λ20 := 3
λ21 := 2
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P[0] := 0
P[1] := 0
P[2] := 1
t := 1 .. 100
Y0 := [0; 0; 1]
p[0] == -(λ01 + λ02)*P[0] + λ10*P[1] + λ20*P[2] → p[0] == 3
p[1] == λ01*P[0] - (λ12 + λ10)*P[1] + λ21*P[2] → p[1] == 2
p[2] == λ02*P[0] + λ12*P[1] - (λ20 + λ21)*P[2] → p[2] == -5
D(t, Y) := [
    -(λ01 + λ02)*Y[0] + λ10*Y[1] + λ20*Y[2];
    λ01*Y[0] - (λ12 + λ10)*Y[1] + λ21*Y[2];
    λ02*Y[0] + λ12*Y[1] - (λ20 + λ21)*Y[2]
] → [4*Y[1] - 6*Y[0] + 3*Y[2]; 4*Y[0] - 7*Y[1] + 2*Y[2]; 2*Y[0] + 3*Y[1] - 5*Y[2]]
num := 1000
i := 1 .. 3
S1 := Rkadapt(Y0, 0, 3, num, D)
S1[num, i] = [0.367089; 0.303797; 0.329114]
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M := [-6, 4, 3; 4, -7, 2; 1, 1, 1]
soln := lsolve(M, Y0)
soln = [0.367089; 0.303797; 0.329114]
