λ := 1/27
μ := 1/17
U := λ/μ = 0.62963
c := 1
N := 1
n := 1
U := λ/(μ*n) = 0.62963
p := λ/μ = 0.62963
Wq := 0
Lq := 0
Ws := Wq + 1/μ = 17
Ls := Lq + λ/μ = 0.62963
p0 := sum((p^n/n!) + p^c*(1 - (p/c)^(N - c + 1))/(c!*(1 - p/c)), n = 0 .. c - 1)^-1 = 0.613636
pn := (p^n/n!)*p0 = 0.386364
Lq := p^(c + 1)/((c - 1)!*(c - p)^2)*(1 - (p/c)^(N - c + 1) - (N - c + 1)*(1 - p/c)*(p/c)^(N - c))*p0 = 0
Ls := Lq + λ*(1 - pn)/μ = 0.386364
Wq := Lq/λ = 0
Ws := Wq + 1/μ = 17
