λ := 1/27 = 0.037037
μ := 1/17
N := 3
p := λ/μ = 0.62963
n := 0 .. N
P[n] := (1 - p)/(1 - p^(N + 1))*p^n
Ls := p*(1 - (N + 1)*p^N + N*p^(N + 1))/((1 - p)*(1 - p^(N + 1))) = 0.954144
λe := λ*(1 - P[N]) = 0.0329746
Ws := Ls/λe = 28.9357
U := λe/μ = 0.560569
Lq := Ls - λe/μ = 0.393575
Wq := Lq/λe = 11.9357
λ/μ = 0.62963
0.561*μ = 0.033
P = [0.439431; 0.276679; 0.174205; 0.109685]
sum(n*P[n], n = 0 .. N) = 0.954144
25, 7
Ws := Wq + 1/μ = 28.9357
Ls/λe = 28.9357
Ws - 1/μ = 11.9357
λ*(N - Ls) = 0.0757725
λe := 0.033
