λ := 1/27
μ := 1/17
ρ := λ/μ
c := 2
U := λ/(c*μ) = 0.314815
ρ/c = 0.314815
n := 0 .. c
p[0] := (sum(ρ^n/n!, n = 0 .. c - 1) + ρ^c/(c!*(1 - ρ/c)))^-1 = 0.521127
p[n] := ρ^n*p[0]/n!
Lq := c*ρ*p[2]/(c - ρ)^2 = 0.0692664
Wq := Lq/λ = 1.87019
Ws := Wq + 1/μ = 18.8702
Ls := Lq + ρ = 0.698896
P2 := (1 - p)/(1 - p^(N + 1))*p^2  # error: Значение имеет единицы измерения: Unitless, а должно иметь единицы измерения: сила.
λ/μ = 0.62963
λe := λ*(1 - P2)  # error: Эта переменная не определена.
U := λe/μ  # error: Эта переменная не определена.
Ls := p*(1 - (N + 1)*p^N + N*p^(N + 1))/((1 - p)*(1 - p^(N + 1)))  # error: Значение имеет единицы измерения: Unitless, а должно иметь единицы измерения: сила.
Lq := Ls - λe/μ  # error: Эта переменная не определена.
Wq := Lq/λe  # error: Эта переменная не определена.
Ws := Wq + 1/μ  # error: Эта переменная не определена.
